# [area: COMPARADOR SIMETRICO - INVERSOR]
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# [area: COMPARADOR SIMETRICO - NAO INVERSOR]
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# [area: COMPARADOR ASSIMETRICO - INVERSOR]
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R1 := 39 kΩ  # disabled
R2 := 39 kΩ  # disabled
R3 := 3.9 kΩ  # disabled
V_CC := 5 V  # disabled
V_OL := 0 V  # disabled
V_OH := 5 V  # disabled
Rp_13 := R1*R3/(R1 + R3)  # disabled
Rp_12 := R1*R2/(R1 + R2)  # disabled
V_TL := (Rp_13/(Rp_13 + R2)*V_CC + Rp_12/(Rp_12 + R3)*V_OL)  # disabled
V_TH := (Rp_13/(Rp_13 + R2)*V_CC + Rp_12/(Rp_12 + R3)*V_OH)  # disabled
HYST := V_TH - V_TL  # disabled
HYST := Rp_12/(Rp_12 + R3)*(V_OH - V_OL)  # disabled
# [area: COMPARADOR ASSIMETRICO - NAO INVERSOR]
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R1 := 10 kΩ
R2 := 10 kΩ
R3 := 47 kΩ
R4 := 51 kΩ
V_CC := 5 V
V_OL := 0 V
V_OH := 4 V
V_REF := R1/(R1 + R2)*V_CC = 2.5 V
V_TL := (R3 + R4)/R4*V_REF - R3/R4*V_OH = 1.11765 V
V_TH := (R3 + R4)/R4*V_REF - R3/R4*V_OL = 4.80392 V
HYST := V_TH - V_TL = 3.68627 V
HYST := R3/R4*(V_OH - V_OL) = 3.68627 V
